Flying-Wing Dynamic Stability (generated by MATLAB)
0.0
0 0 0.0
0.300030  0.188288  1.596952
0.347071  0.003289  -0.002898
0.0

SURFACE
Wing
12 1.0 20 1.0
YDUPLICATE
0.0

SECTION
0.082200  0.145000  0.000000  0.203110  -1.314250
NACA
0012

SECTION
0.367255  0.624085  0.000000  0.184830  -1.314250
NACA
0012

SECTION
0.509782  0.863628  0.000000  0.175690  -1.314250
NACA
0012

CONTROL
elevator  1.000  0.750  0 0 0  1.0

CONTROL
aileron   1.000  0.750  0 0 0  -1.0

SECTION
0.557291  0.943476  0.000000  0.172643  -1.314250
NACA
0012

CONTROL
elevator  1.000  0.750  0 0 0  1.0

CONTROL
aileron   1.000  0.750  0 0 0  -1.0

SURFACE
Vfin_R
8 1.0 12 1.0

SECTION
0.557291  0.943476  0.000000  0.176265  0.000000
NACA
0010

SECTION
0.576055  0.943476  0.027920  0.165689  0.000000
NACA
0010

SECTION
0.676128  0.943476  0.176829  0.109284  0.000000
NACA
0010

CONTROL
rudder  1.000  0.700  0 0 0  1.0

SECTION
0.682383  0.943476  0.186136  0.105759  0.000000
NACA
0010

CONTROL
rudder  1.000  0.700  0 0 0  1.0

SURFACE
Vfin_L
8 1.0 12 1.0

SECTION
0.557291  -0.943476  0.000000  0.176265  0.000000
NACA
0010

SECTION
0.576055  -0.943476  0.027920  0.165689  0.000000
NACA
0010

SECTION
0.676128  -0.943476  0.176829  0.109284  0.000000
NACA
0010

CONTROL
rudder  -1.000  0.700  0 0 0  1.0

SECTION
0.682383  -0.943476  0.186136  0.105759  0.000000
NACA
0010

CONTROL
rudder  -1.000  0.700  0 0 0  1.0
